f(x) := x*sin(x)
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f(x) =  # error: Эта переменная не определена.
x := 0
x1_min := Minimize(f, x)
x1_min = 0
y1_min := f(x1_min)
y1_min = 0
x := 2
x1_max := Maximize(f, x)
x1_max = 2.02876
y1_max := f(x1_max)
y1_max = 1.81971
x := 5
x2_min := Minimize(f, x)
x2_min = 4.91318
y2_min := f(x2_min)
y2_min = -4.81447
x := 8
x2_max := Minimize(f, x)
x2_max = 11.0855
y2_max := f(x2_min)
y2_max = -4.81447
x := 10
x3_min := Minimize(f, x)
x3_min = 11.0855
y3_min := f(x2_min)
y3_min = -4.81447
