# На графике видны две точки пересечения кривых.Поэтому у системы есть два решения
n := 5
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Принимаем
x := 2
y := -1
Given
(x - n)^2 - y - n == 0
x - 2*y - n == 0
R := Find(x, y) = [3; -1]
Принимаем
x := 7
y := 1
Given
(x - n)^2 - y - n == 0
x - 2*y - n == 0
R := Find(x, y) = [7.5; 1.25]
