n := 7
a := -3*n
b := 3*n
N := 3
A := runif(N, a, b)
A = [-20.9467; -12.8804; 3.57026]
B := runif(N, a, b)
B = [-6.28706; 13.5592; -13.6866]
C := runif(N, a, b)
C = [8.84081; -8.23259; -17.1607]
s := A*B = -91.8195
A[0]*B[0] + A[1]*B[1] + A[2]*B[2] = -91.8195
V := B×C = [-345.361; -228.891; -68.1154]
[B[1]*C[2] - B[2]*C[1]; -(B[0]*C[2] - B[2]*C[0]); B[0]*C[1] - B[1]*C[0]] = [-345.361; -228.891; -68.1154]
w := (A×B)*C = 9939.22
vsum := [A[1]*B[2] - A[2]*B[1]; -(A[0]*B[2] - A[2]*B[0]); A[0]*B[1] - A[1]*B[0]]
vsum[0]*C[0] + vsum[1]*C[1] + vsum[2]*C[2] = 9939.22
|A| = 24.8479
|B| = 20.2658
|C| = 20.9863
re := if((|A| > |B|)*(|A| > |C|), "Это A", if((|B| > |A|)*(|B| > |C|), "Это B", "Это C")) = "Это A"
re = "Это A"
