x := 7
y := 10
z := 3
p := if(x > y, sin(x) + 3*|y| - z^2, (y + 3)/sqrt(z^2 + 1)*ln(|x + 1|))
q := if((x > y)*(x < 1), cos(x) + 2*|y + 1| - z, (x*y + 3)/sqrt(y^2 + 5))
w := if((x < y) + (y ≥ 10), x^2 + 2*(y*x + 1) - z, (x^-3*y^2 + 3)*sqrt(y^2 + 5))
