x1 := -2*π
x2 := 2*π
Δx := π/4
g(x) := sqrt(|x|)*sin(x)
i := 0 .. 16
X[i] := x1 + i*Δx
Y[i] := g(X[i])
filenameX := "X.txt"
filenameY := "Y.txt"
WRITEPRN(filenameX) := X
WRITEPRN(filenameY) := Y
XX := READPRN(filenameX)
YY := READPRN(filenameY)
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