f(x) := if(x < 0, exp(3)*x^2, exp(-x)*x^2)
Δx := 0.25
x := -9, -9 + Δx .. 9
x = [
    -9; -8.75; -8.5; -8.25; -8; -7.75; -7.5; -7.25; -7; -6.75
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]
f(x) = [
    1626.93; 1537.8; 1451.18; 1367.07; 1285.47; 1206.39; 1129.81; 1055.75; 984.191; 915.147
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]
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fu(x) := if(x < 0, exp(x)*x^3, exp(-x)*x^3)
fu(x) = [
    -0.0899657; -0.106157; -0.124955; -0.146701; -0.171757; -0.200504; -0.233332; -0.270632; -0.312776; -0.3601
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]
