x := -2, -1.6 .. 2
n := Round(runif(1, 2, 10), 1)
n = [2]
f(x) := (x^2 - n*x + sin(x))*sqrt(x - cos(n*x))
f(x) = [8.22753i; 3.69265i; 1.97785i; 1.33681i; 0.597535i; 4.44089e-16i; -0.136494i; -0.220952; -0.0389189; 0.579605; 1.48125]
